// COMSOL Multiphysics 6.0.0.318 model "comsol_curved_U_R0p4_15x15x10_meshcheck_Model.mph"
// Outline of the model tree

Selections
  sel_theta0_face: Box "框"
    entitydim = 2
    xmin = -1.0E-8
    xmax = 0.30000001
    ymin = -1.0E-8
    ymax = 1.0E-8
    zmin = 0.39699999
    zmax = 0.40300001
    condition = allvertices
  sel_axial_inner: Box "框 2"
    entitydim = 1
    xmin = -1.0E-8
    xmax = 0.30000001
    ymin = -1.0E-8
    ymax = 1.0E-8
    zmin = 0.39699999
    zmax = 0.39700001
    condition = allvertices
  sel_axial_outer: Box "框 3"
    entitydim = 1
    xmin = -1.0E-8
    xmax = 0.30000001
    ymin = -1.0E-8
    ymax = 1.0E-8
    zmin = 0.40299999
    zmax = 0.40300001
    condition = allvertices
  sel_axial_edges: Union "并集" | entitydim = 1; input = {sel_axial_inner, sel_axial_outer}
  sel_radial_x0: Box "框 4"
    entitydim = 1
    xmin = -1.0E-8
    xmax = 1.0E-8
    ymin = -1.0E-8
    ymax = 1.0E-8
    zmin = 0.39699999
    zmax = 0.40300001
    condition = allvertices
  sel_radial_xL: Box "框 5"
    entitydim = 1
    xmin = 0.29999999
    xmax = 0.30000001
    ymin = -1.0E-8
    ymax = 1.0E-8
    zmin = 0.39699999
    zmax = 0.40300001
    condition = allvertices
  sel_radial_edges: Union "并集 2" | entitydim = 1; input = {sel_radial_x0, sel_radial_xL}
  sel_outer_face: Cylinder "圆柱体"
    entitydim = 2
    r = 0.40300001
    rin = 0.40299999
    top = 0.30000001
    bottom = -1.0E-8
    axis = {1, 0, 0}
    axistype = x
    ax3 = {1, 0, 0}
    ax2 = {90.0, 0.0}
    condition = allvertices
  sel_inner_face: Cylinder "圆柱体 2"
    entitydim = 2
    r = 0.39700001
    rin = 0.39699999
    top = 0.30000001
    bottom = -1.0E-8
    axis = {1, 0, 0}
    axistype = x
    ax3 = {1, 0, 0}
    ax2 = {90.0, 0.0}
    condition = allvertices

Geometry
  geom1 "几何 1" (3D, length unit m)
    wp1: WorkPlane "工作平面 1" | quickplane = xz
      r1: Rectangle "矩形 1" | pos = {0, 0.397}; size = {0.3, 0.006}
    rev1: Revolve "回转 1"
      workplane = wp1
      input = wp1.r1
      angle2 = 42.9718346348
      axis = {1, 0}
      revaxis = {{0, 1}, {0, 0}}
    fin: Finalize "形成联合体"

Materials
  mat1: Common "U Vf0.6 isotropic reduced material" on all domains
    def "基本"
      youngsmodulus = 1.206E11[Pa]
      poissonsratio = 0.3398
      density = 5600.0[kg/m^3]

Physics
  solid: SolidMechanics "固体力学" on all domains
    dependent variable u = {u, v, w}
    ShapeProperty.order_displacement = 2s
    lemm1: LinearElasticModel "线弹性材料 1" (default)
    free1: Free "自由 1" (default)
    init1: init "初始值 1" (default)
    fix1: Fixed "固定约束 1" on selection sel_theta0_face
    load1: BoundaryLoad "边界载荷 1" on selection sel_outer_face | LoadType = FollowerPressure; FollowerPressure = 15000.0[Pa]

Mesh
  mesh1 "网格 1"
    size: MeshSizeDefault "大小" | hmax = 0.03; hmin = 0.0054; hcurve = 0.6; hnarrow = 0.5; hgrad = 1.5
    map1: Map "映射 1" on boundaries 5
      dis_ax: Distribution "分布" on edges 7, 8 | numelem = 15
      dis_th: Distribution "分布 2" on edges 6, 12 | numelem = 10
    swe1: Sweep "扫掠 1" on remaining entities | sourceface = boundaries 5
      dis1: Distribution "分布 1" on all domains | numelem = 15

Studies
  std1 "研究 1"
    stat: Stationary "稳态"

Solver configurations
  sol1 "解 1" (study std1)
    v1: Variables "因变量 1"
    s1: Stationary "稳态求解器 1"
      fc1: FullyCoupled "全耦合 1"
      d1: Direct "建议的直接求解器 (solid)"

Datasets
  dset1: Solution | solution = sol1

Derived values
  interp1: Interp "插值 1" on all domains | data = dset1; expr = -v*sin(0.375)+w*cos(0.375)
  interp2: Interp "插值 2" on all domains | data = dset1; expr = sqrt(u^2+v^2+w^2)
  interp3: Interp "插值 3" on all domains | data = dset1; expr = -v*sin(0.0)+w*cos(0.0)
  interp4: Interp "插值 4" on all domains | data = dset1; expr = -v*sin(0.075)+w*cos(0.075)
  interp5: Interp "插值 5" on all domains | data = dset1; expr = -v*sin(0.15)+w*cos(0.15)
  interp6: Interp "插值 6" on all domains | data = dset1; expr = -v*sin(0.225)+w*cos(0.225)
  interp7: Interp "插值 7" on all domains | data = dset1; expr = -v*sin(0.3)+w*cos(0.3)
  interp8: Interp "插值 8" on all domains | data = dset1; expr = -v*sin(0.375)+w*cos(0.375)
  interp9: Interp "插值 9" on all domains | data = dset1; expr = -v*sin(0.45)+w*cos(0.45)
  interp10: Interp "插值 10" on all domains | data = dset1; expr = -v*sin(0.525)+w*cos(0.525)
  interp11: Interp "插值 11" on all domains | data = dset1; expr = -v*sin(0.6)+w*cos(0.6)
  interp12: Interp "插值 12" on all domains | data = dset1; expr = -v*sin(0.675)+w*cos(0.675)
  interp13: Interp "插值 13" on all domains | data = dset1; expr = -v*sin(0.749999999)+w*cos(0.749999999)