// COMSOL Multiphysics 6.0.0.318 model "comsol_inverse_sensor_10x10x1_smoke_Model.mph"
// Outline of the model tree

Parameters
  pLoad = 15000.0[Pa]

Selections
  sel_fixed: Box "框"
    entitydim = 2
    xmin = -1e-9
    xmax = 1e-9
    ymin = -1e-9
    ymax = 0.300000001
    zmin = -0.003000001
    zmax = 0.003000001
    condition = allvertices
  sel_top: Box "框 2"
    entitydim = 2
    xmin = -1e-9
    xmax = 0.300000001
    ymin = -1e-9
    ymax = 0.300000001
    zmin = 0.002999999
    zmax = 0.003000001
    condition = allvertices
  sel_bottom: Box "框 3"
    entitydim = 2
    xmin = -1e-9
    xmax = 0.300000001
    ymin = -1e-9
    ymax = 0.300000001
    zmin = -0.003000001
    zmax = -0.002999999
    condition = allvertices
  sel_bottom_edges: Box "框 4"
    entitydim = 1
    xmin = -1e-9
    xmax = 0.300000001
    ymin = -1e-9
    ymax = 0.300000001
    zmin = -0.003000001
    zmax = -0.002999999
    condition = allvertices
  sel_layer_1: Box "框 1"
    entitydim = 3
    xmin = -1e-9
    xmax = 0.300000001
    ymin = -1e-9
    ymax = 0.300000001
    zmin = -0.003000001
    zmax = -0.002399999
    condition = allvertices
  sel_layer_2: Box "框 2a"
    entitydim = 3
    xmin = -1e-9
    xmax = 0.300000001
    ymin = -1e-9
    ymax = 0.300000001
    zmin = -0.002400001
    zmax = -0.001799999
    condition = allvertices
  sel_layer_3: Box "框 3a"
    entitydim = 3
    xmin = -1e-9
    xmax = 0.300000001
    ymin = -1e-9
    ymax = 0.300000001
    zmin = -0.001800001
    zmax = -0.001199999
    condition = allvertices
  sel_layer_4: Box "框 4a"
    entitydim = 3
    xmin = -1e-9
    xmax = 0.300000001
    ymin = -1e-9
    ymax = 0.300000001
    zmin = -0.001200001
    zmax = -0.000599999
    condition = allvertices
  sel_layer_5: Box "框 5"
    entitydim = 3
    xmin = -1e-9
    xmax = 0.300000001
    ymin = -1e-9
    ymax = 0.300000001
    zmin = -0.000600001
    zmax = 9.99999999675e-10
    condition = allvertices
  sel_layer_6: Box "框 6"
    entitydim = 3
    xmin = -1e-9
    xmax = 0.300000001
    ymin = -1e-9
    ymax = 0.300000001
    zmin = -1.00000000043e-09
    zmax = 0.000600001
    condition = allvertices
  sel_layer_7: Box "框 7"
    entitydim = 3
    xmin = -1e-9
    xmax = 0.300000001
    ymin = -1e-9
    ymax = 0.300000001
    zmin = 0.000599999
    zmax = 0.001200001
    condition = allvertices
  sel_layer_8: Box "框 8"
    entitydim = 3
    xmin = -1e-9
    xmax = 0.300000001
    ymin = -1e-9
    ymax = 0.300000001
    zmin = 0.001199999
    zmax = 0.001800001
    condition = allvertices
  sel_layer_9: Box "框 9"
    entitydim = 3
    xmin = -1e-9
    xmax = 0.300000001
    ymin = -1e-9
    ymax = 0.300000001
    zmin = 0.001799999
    zmax = 0.002400001
    condition = allvertices
  sel_layer_10: Box "框 10"
    entitydim = 3
    xmin = -1e-9
    xmax = 0.300000001
    ymin = -1e-9
    ymax = 0.300000001
    zmin = 0.002399999
    zmax = 0.003000001
    condition = allvertices

Geometry
  geom1 "几何 1" (3D, length unit m)
    blk1: Block "长方体 1" | pos = {0, 0, -0.003}; size = {0.3, 0.3, 6.0E-4}
    blk2: Block "长方体 2" | pos = {0, 0, -0.0024}; size = {0.3, 0.3, 6.0E-4}
    blk3: Block "长方体 3" | pos = {0, 0, -0.0018}; size = {0.3, 0.3, 6.0E-4}
    blk4: Block "长方体 4" | pos = {0, 0, -0.0012}; size = {0.3, 0.3, 6.0E-4}
    blk5: Block "长方体 5" | pos = {0, 0, -0.0006}; size = {0.3, 0.3, 6.0E-4}
    blk6: Block "长方体 6" | pos = {0, 0, -4.33680868994e-19}; size = {0.3, 0.3, 6.0E-4}
    blk7: Block "长方体 7" | pos = {0, 0, 0.0006}; size = {0.3, 0.3, 6.0E-4}
    blk8: Block "长方体 8" | pos = {0, 0, 0.0012}; size = {0.3, 0.3, 6.0E-4}
    blk9: Block "长方体 9" | pos = {0, 0, 0.0018}; size = {0.3, 0.3, 6.0E-4}
    blk10: Block "长方体 10" | pos = {0, 0, 0.0024}; size = {0.3, 0.3, 6.0E-4}
    fin: Finalize "形成联合体"

Materials
  mat1: Common "U Vf0.6 reduced-property 3D diagnostic" on all domains
    def "基本"
      youngsmodulus = 1.206E11[Pa]
      poissonsratio = 0.3398
      density = 5600.0[kg/m^3]

Physics
  solid: SolidMechanics "固体力学" on all domains
    dependent variable u = {u, v, w}
    ShapeProperty.order_displacement = 2s
    lemm1: LinearElasticModel "线弹性材料 1" (default)
    free1: Free "自由 1" (default)
    init1: init "初始值 1" (default)
    fix1: Fixed "固定约束 1" on selection sel_fixed
    bndl1: BoundaryLoad "边界载荷 1" on selection sel_top | LoadType = ForceArea; FperArea = {0, 0, -pLoad}

Mesh
  mesh1 "网格 1"
    size: MeshSizeDefault "大小" | hmax = 0.03; hmin = 0.0054; hcurve = 0.6; hnarrow = 0.5; hgrad = 1.5
    map1: Map "映射 1" on boundaries 3
      dis1: Distribution "分布 1" on edges 2, 3, 34, 55 | numelem = 10
    swe1: Sweep "扫掠 1" on remaining entities | sweeppath = straight; sourceface = boundaries 3
      dis1: Distribution "分布 1" on all domains | numelem = 1

Studies
  std1 "研究 1"
    stat: Stationary "稳态"

Solver configurations
  sol1 "解 1" (study std1)
    v1: Variables "因变量 1"
    s1: Stationary "稳态求解器 1"
      fc1: FullyCoupled "全耦合 1"
      d1: Direct "建议的直接求解器 (solid)"

Datasets
  dset1: Solution | solution = sol1

Derived values
  interp1: Interp "插值 1" on all domains | data = dset1; expr = w
  av2: AvVolume "体积平均 2" on selection sel_layer_1 | data = dset1; expr = solid.eXX
  av3: AvVolume "体积平均 3" on selection sel_layer_1 | data = dset1; expr = solid.eYY
  av4: AvVolume "体积平均 4" on selection sel_layer_2 | data = dset1; expr = solid.eXX
  av5: AvVolume "体积平均 5" on selection sel_layer_2 | data = dset1; expr = solid.eYY
  av6: AvVolume "体积平均 6" on selection sel_layer_3 | data = dset1; expr = solid.eXX
  av7: AvVolume "体积平均 7" on selection sel_layer_3 | data = dset1; expr = solid.eYY
  av8: AvVolume "体积平均 8" on selection sel_layer_4 | data = dset1; expr = solid.eXX
  av9: AvVolume "体积平均 9" on selection sel_layer_4 | data = dset1; expr = solid.eYY
  av10: AvVolume "体积平均 10" on selection sel_layer_5 | data = dset1; expr = solid.eXX
  av11: AvVolume "体积平均 11" on selection sel_layer_5 | data = dset1; expr = solid.eYY
  av12: AvVolume "体积平均 12" on selection sel_layer_6 | data = dset1; expr = solid.eXX
  av13: AvVolume "体积平均 13" on selection sel_layer_6 | data = dset1; expr = solid.eYY
  av14: AvVolume "体积平均 14" on selection sel_layer_7 | data = dset1; expr = solid.eXX
  av15: AvVolume "体积平均 15" on selection sel_layer_7 | data = dset1; expr = solid.eYY
  av16: AvVolume "体积平均 16" on selection sel_layer_8 | data = dset1; expr = solid.eXX
  av17: AvVolume "体积平均 17" on selection sel_layer_8 | data = dset1; expr = solid.eYY
  av18: AvVolume "体积平均 18" on selection sel_layer_9 | data = dset1; expr = solid.eXX
  av19: AvVolume "体积平均 19" on selection sel_layer_9 | data = dset1; expr = solid.eYY
  av20: AvVolume "体积平均 20" on selection sel_layer_10 | data = dset1; expr = solid.eXX
  av21: AvVolume "体积平均 21" on selection sel_layer_10 | data = dset1; expr = solid.eYY