// COMSOL Multiphysics 6.0.0.318 model "comsol_isomorphic_electric_equivalent_stress_20x_Model.mph"
// Outline of the model tree

Selections
  sel_fixed: Box "框"
    entitydim = 2
    xmin = -1e-9
    xmax = 1e-9
    ymin = -1e-9
    ymax = 0.300000001
    zmin = -0.003000001
    zmax = 0.003000001
    condition = allvertices
  sel_bottom_dom: Box "框 2"
    entitydim = 3
    xmin = -1e-9
    xmax = 0.300000001
    ymin = -1e-9
    ymax = 0.300000001
    zmin = -0.003000001
    zmax = -0.002399999
    condition = allvertices
  sel_top_dom: Box "框 3"
    entitydim = 3
    xmin = -1e-9
    xmax = 0.300000001
    ymin = -1e-9
    ymax = 0.300000001
    zmin = 0.002399999
    zmax = 0.003000001
    condition = allvertices
  sel_bottom_outer: Box "框 4"
    entitydim = 2
    xmin = -1e-9
    xmax = 0.300000001
    ymin = -1e-9
    ymax = 0.300000001
    zmin = -0.003000001
    zmax = -0.002999999
    condition = allvertices
  sel_bottom_edges: Box "框 5"
    entitydim = 1
    xmin = -1e-9
    xmax = 0.300000001
    ymin = -1e-9
    ymax = 0.300000001
    zmin = -0.003000001
    zmax = -0.002999999
    condition = allvertices

Geometry
  geom1 "几何 1" (3D, length unit m)
    blk1: Block "长方体 1" | pos = {0, 0, -0.003}; size = {0.3, 0.3, 6.0E-4}
    blk2: Block "长方体 2" | pos = {0, 0, -0.0024}; size = {0.3, 0.3, 6.0E-4}
    blk3: Block "长方体 3" | pos = {0, 0, -0.0018}; size = {0.3, 0.3, 6.0E-4}
    blk4: Block "长方体 4" | pos = {0, 0, -0.0012}; size = {0.3, 0.3, 6.0E-4}
    blk5: Block "长方体 5" | pos = {0, 0, -0.0006}; size = {0.3, 0.3, 6.0E-4}
    blk6: Block "长方体 6" | pos = {0, 0, -4.33680868994e-19}; size = {0.3, 0.3, 6.0E-4}
    blk7: Block "长方体 7" | pos = {0, 0, 0.0006}; size = {0.3, 0.3, 6.0E-4}
    blk8: Block "长方体 8" | pos = {0, 0, 0.0012}; size = {0.3, 0.3, 6.0E-4}
    blk9: Block "长方体 9" | pos = {0, 0, 0.0018}; size = {0.3, 0.3, 6.0E-4}
    blk10: Block "长方体 10" | pos = {0, 0, 0.0024}; size = {0.3, 0.3, 6.0E-4}
    fin: Finalize "形成联合体"

Materials
  mat1: Common "Matched isotropic solid material" on all domains
    def "基本"
      youngsmodulus = 1.206E11[Pa]
      poissonsratio = 0.3398
      density = 5600.0[kg/m^3]

Physics
  solid: SolidMechanics "固体力学" on all domains
    dependent variable u = {u, v, w}
    ShapeProperty.order_displacement = 2s
    lemm1: LinearElasticModel "线弹性材料 1" (default)
      exs_bottom: ExternalStress "外部应力" on selection sel_bottom_dom
        StressInputType = StressTensorMaterial
        ContributionType = Stress
        Sext = diag{4934000.0[Pa], 4934000.0[Pa], 0}
      exs_top: ExternalStress "外部应力 2" on selection sel_top_dom
        StressInputType = StressTensorMaterial
        ContributionType = Stress
        Sext = diag{-4934000.0[Pa], -4934000.0[Pa], 0}
    free1: Free "自由 1" (default)
    init1: init "初始值 1" (default)
    fix1: Fixed "固定约束 1" on selection sel_fixed

Mesh
  mesh1 "网格 1"
    size: MeshSizeDefault "大小" | hmax = 0.03; hmin = 0.0054; hcurve = 0.6; hnarrow = 0.5; hgrad = 1.5
    map1: Map "映射 1" on boundaries 3
      dis1: Distribution "分布 1" on edges 2, 3, 34, 55 | numelem = 20
    swe1: Sweep "扫掠 1" on remaining entities | sweeppath = straight; sourceface = boundaries 3
      dis1: Distribution "分布 1" on all domains | numelem = 1

Studies
  std1 "研究 1"
    stat: Stationary "稳态"

Solver configurations
  sol1 "解 1" (study std1)
    v1: Variables "因变量 1"
    s1: Stationary "稳态求解器 1"
      fc1: FullyCoupled "全耦合 1"
      d1: Direct "建议的直接求解器 (solid)"

Datasets
  dset1: Solution | solution = sol1

Derived values
  interp1: Interp "插值 1" on all domains | data = dset1; expr = w
  interp2: Interp "插值 2" on all domains | data = dset1; expr = w
  interp3: Interp "插值 3" on all domains | data = dset1; expr = w
  interp4: Interp "插值 4" on all domains | data = dset1; expr = w
  interp5: Interp "插值 5" on all domains | data = dset1; expr = w
  interp6: Interp "插值 6" on all domains | data = dset1; expr = w
  interp7: Interp "插值 7" on all domains | data = dset1; expr = w
  interp8: Interp "插值 8" on all domains | data = dset1; expr = w
  interp9: Interp "插值 9" on all domains | data = dset1; expr = w
  interp10: Interp "插值 10" on all domains | data = dset1; expr = w
  interp11: Interp "插值 11" on all domains | data = dset1; expr = w
  interp12: Interp "插值 12" on all domains | data = dset1; expr = w
  interp13: Interp "插值 13" on all domains | data = dset1; expr = w